// COMSOL Multiphysics 5.2.0.166 model "linear_buckling_seed.mph"
// Outline of the model tree

Parameters
  La = a*(Di/2)-sqrt(Le^2-(W-Le)^2/4)  // Length a
  Lb = sqrt(2)*(Di/2)*b-Le/sqrt(2)  // Length b
  Di = 20[mm]  // Lattice distance
  W = Le*(1+sqrt(2))  // Width
  Le = 2[mm]  // End lenfth
  a = 0.94  // a
  b = 0.92  // b
  Nx = 11  // Nx
  Ny = 10  // Ny
  Disp = 0.1[mm]  // Disp
  tt = (1-a)*Di/4+sqrt(Le^2-(W-Le)^2/4)/2  // tt
  F = 1[N]  // Load on structure
  W2 = 2*Le/sqrt(2)

Functions
  rn1: Random | uniformrange = 0.00001
  pw1: Piecewise | arg = x; smooth = contd2; pieces = {{-Le/2, -Le/2+Le/10, 0}, {-Le/2+Le/10, Le/2-Le/10, rn1(x)}, {Le/2-Le/10, Le/2, 0}}

Couplings
  root.comp1.field1.intop_ee: Integration on domains 1 | intorder = 8; frame = material
  intop1: Integration on boundaries 10, 12, 14, 16, 18, 20, 22, 24, 26, 28 | method = summation

Geometry
  geom1 "Geometry 1" (2D, length unit m)
    pc1: ParametricCurve | parmax = La; coord = {W/2, s}
    pc2: ParametricCurve | parmin = Le/2; parmax = W/2; coord = {s, La+W/2+(s*sqrt(Le^2 - (-Le + W)^2/4))/(Le/2 - W/2)}
    pc3: ParametricCurve | parmin = -Le/2; parmax = Le/2; coord = {s, La+sqrt(Le^2-(W-Le)^2/4)}
    pc4: ParametricCurve | parmin = -W/2; parmax = -Le/2; coord = {s, La+W/2 -(s*sqrt(Le^2 - (-Le + W)^2/4))/(Le/2 - W/2)}
    pc5: ParametricCurve | parmax = La; coord = {-W/2, s}
    pc6: ParametricCurve | parmin = -W/2; parmax = W/2; coord = {s, 0}
    csol1: ConvertToSolid | input = pc1, pc2, pc3, pc4, pc5, pc6
    mir1: Mirror | input = csol1; keep = on; axis = {0, 1}
    rot1: Rotate | input = csol1, mir1; keep = on; rot = 90
    pc7: ParametricCurve | parmax = Lb; coord = {W2/2, s}
    pc8: ParametricCurve | parmax = W2/2; coord = {W2/2-s, Lb+ s}
    pc9: ParametricCurve | parmax = W2/2; coord = {-s, Lb-s+Le/sqrt(2)}
    pc10: ParametricCurve | parmax = Lb; coord = {-W2/2, Lb-s}
    pc11: ParametricCurve | parmax = W2; coord = {-W2/2+s, 0}
    csol2: ConvertToSolid | input = pc10, pc11, pc7, pc8, pc9
    mir2: Mirror | input = csol2; keep = on; axis = {0, 1}
    rot2: Rotate | input = csol2, mir2; keep = on; rot = 90
    rot3: Rotate | input = csol2, mir2, rot2; rot = 45
    c1: Circle | r = Di/3
    uni1: Union | input = c1, csol1, mir1, rot1, rot3
    mov1: Move | input = uni1; displx = Di/2; disply = Di/2
    arr1: Array | input = mov1; size = {Nx, Ny}; displ = {Di, Di}
    r1: Rectangle | size = {Nx*Di, Ny*Di}
    dif1: Difference | input = r1; input2 = arr1
    r3: Rectangle | pos = {0, 0}; size = {Di/2, Ny*Di}
    r4: Rectangle | pos = {Nx*Di-Di/2, 0}; size = {Di/2, Ny*Di}
    r2: Rectangle | pos = {-tt, Ny*Di-Di/2}; size = {Nx*Di+2*tt, Di/2}
    r5: Rectangle | pos = {-tt, 0}; size = {Nx*Di+2*tt, Di/2}
    dif2: Difference | input = dif1, r3, r4; input2 = r2, r3, r4, r5
    mov2: Move | input = dif2; displx = tt/2
    uni2: Union | input = mov2
    fin: Finalize "Form Union"

Materials
  mat1: Common "Silicon" on domains 1
    def "Basic"
      relpermeability = 1
      electricconductivity = 1e-12[S/m]
      thermalexpansioncoefficient = 2.6e-6[1/K]
      heatcapacity = 700[J/(kg*K)]
      relpermittivity = 11.7
      density = 2329[kg/m^3]
      thermalconductivity = 130[W/(m*K)]
    Enu "Young's modulus and Poisson's ratio"
      youngsmodulus = 170e9[Pa]
      poissonsratio = 0.28
    RefractiveIndex
      n = 3.48
      ki = 0

Physics
  solid: SolidMechanics on all domains
    dependent variable u = {u, v, w}
    StructuralTransientBehavior.StructuralTransientBehavior = Quasistatic
    lemm1: LinearElasticModel "Linear Elastic Material 1" (default)
    free1: Free (default)
    init1: init "Initial Values 1" (default)
    disp5: Displacement0 "Prescribed Displacement 5" on points 2199 | Direction = {1, 1, 0}
    bndl1: BoundaryLoad on boundaries 11, 13, 15, 17, 19, 21, 23, 25, 27, 29
      LoadType = TotalForce
      Ftot = {0, -F, 0}
      FperArea = {0, -F, 0}
    roll1: Roller on boundaries 10, 12, 14, 16, 18, 20, 22, 24, 26, 28
    rig2: RigidConnector on boundaries 38 | RotationType = ConstrainedRotationGroup
    rig3: RigidConnector on boundaries 37 | RotationType = ConstrainedRotationGroup
    rig4: RigidConnector on boundaries 36 | RotationType = ConstrainedRotationGroup
    rig5: RigidConnector on boundaries 35 | RotationType = ConstrainedRotationGroup
    rig6: RigidConnector on boundaries 34 | RotationType = ConstrainedRotationGroup
    rig7: RigidConnector on boundaries 33 | RotationType = ConstrainedRotationGroup
    rig8: RigidConnector on boundaries 32 | RotationType = ConstrainedRotationGroup
    rig9: RigidConnector on boundaries 31 | RotationType = ConstrainedRotationGroup
    rig10: RigidConnector on boundaries 30 | RotationType = ConstrainedRotationGroup
    rig11: RigidConnector on no boundaries | RotationType = ConstrainedRotationGroup
    rig12: RigidConnector on no boundaries | RotationType = ConstrainedRotationGroup
    rig13: RigidConnector on boundaries 1 | RotationType = ConstrainedRotationGroup
    rig14: RigidConnector on boundaries 2 | RotationType = ConstrainedRotationGroup
    rig15: RigidConnector on boundaries 3 | RotationType = ConstrainedRotationGroup
    rig16: RigidConnector on boundaries 4 | RotationType = ConstrainedRotationGroup
    rig17: RigidConnector on boundaries 5 | RotationType = ConstrainedRotationGroup
    rig18: RigidConnector on boundaries 6 | RotationType = ConstrainedRotationGroup
    rig19: RigidConnector on boundaries 7 | RotationType = ConstrainedRotationGroup
    rig20: RigidConnector on boundaries 8 | RotationType = ConstrainedRotationGroup
    rig21: RigidConnector on boundaries 9 | RotationType = ConstrainedRotationGroup
    rig22: RigidConnector on boundaries 11 | RotationType = ConstrainedRotationGroup
    rig23: RigidConnector on boundaries 13 | RotationType = ConstrainedRotationGroup
    rig24: RigidConnector on boundaries 15 | RotationType = ConstrainedRotationGroup
    rig25: RigidConnector on boundaries 17 | RotationType = ConstrainedRotationGroup
    rig26: RigidConnector on boundaries 19 | RotationType = ConstrainedRotationGroup
    rig27: RigidConnector on boundaries 21 | RotationType = ConstrainedRotationGroup
    rig28: RigidConnector on boundaries 23 | RotationType = ConstrainedRotationGroup
    rig29: RigidConnector on boundaries 25 | RotationType = ConstrainedRotationGroup
    rig30: RigidConnector on boundaries 27 | RotationType = ConstrainedRotationGroup
    rig31: RigidConnector on boundaries 29 | RotationType = ConstrainedRotationGroup
    disp6: Displacement1 "Prescribed Displacement 6" (disabled) on boundaries 11, 13, 15, 17, 19, 21, 23, 25, 27, 29
      Direction = {0, 1, 0}
      U0 = {0, -Disp, 0}

Mesh
  mesh1 "Mesh 1" (physics-controlled)
    size: MeshSizeDefault | hauto = 5

Studies
  std1 "Study 1"
    stat: Stationary
    buckling: LinearBuckling | neigs = 25

Solver configurations
  sol1 "Solution 1" (study std1)
    v1: Variables "Dependent Variables 1"
      comp1_u: Field "Displacement field (Material) (comp1.u)" | scalemethod = manual; scaleval = 1e-2*0.269072480941
      comp1_solid_uv_rig2: State "comp1.solid.uv_rig2" | scalemethod = manual; scaleval = 1e-2*0.269072480941
      comp1_solid_phi_rig2: State "comp1.solid.phi_rig2" | scalemethod = manual; scaleval = 1e-2
      comp1_solid_uv_rig3: State "comp1.solid.uv_rig3" | scalemethod = manual; scaleval = 1e-2*0.269072480941
      comp1_solid_phi_rig3: State "comp1.solid.phi_rig3" | scalemethod = manual; scaleval = 1e-2
      comp1_solid_uv_rig4: State "comp1.solid.uv_rig4" | scalemethod = manual; scaleval = 1e-2*0.269072480941
      comp1_solid_phi_rig4: State "comp1.solid.phi_rig4" | scalemethod = manual; scaleval = 1e-2
      comp1_solid_uv_rig5: State "comp1.solid.uv_rig5" | scalemethod = manual; scaleval = 1e-2*0.269072480941
      comp1_solid_phi_rig5: State "comp1.solid.phi_rig5" | scalemethod = manual; scaleval = 1e-2
      comp1_solid_uv_rig6: State "comp1.solid.uv_rig6" | scalemethod = manual; scaleval = 1e-2*0.269072480941
      comp1_solid_phi_rig6: State "comp1.solid.phi_rig6" | scalemethod = manual; scaleval = 1e-2
      comp1_solid_uv_rig7: State "comp1.solid.uv_rig7" | scalemethod = manual; scaleval = 1e-2*0.269072480941
      comp1_solid_phi_rig7: State "comp1.solid.phi_rig7" | scalemethod = manual; scaleval = 1e-2
      comp1_solid_uv_rig8: State "comp1.solid.uv_rig8" | scalemethod = manual; scaleval = 1e-2*0.269072480941
      comp1_solid_phi_rig8: State "comp1.solid.phi_rig8" | scalemethod = manual; scaleval = 1e-2
      comp1_solid_uv_rig9: State "comp1.solid.uv_rig9" | scalemethod = manual; scaleval = 1e-2*0.269072480941
      comp1_solid_phi_rig9: State "comp1.solid.phi_rig9" | scalemethod = manual; scaleval = 1e-2
      comp1_solid_uv_rig10: State "comp1.solid.uv_rig10" | scalemethod = manual; scaleval = 1e-2*0.269072480941
      comp1_solid_phi_rig10: State "comp1.solid.phi_rig10" | scalemethod = manual; scaleval = 1e-2
      comp1_solid_uv_rig13: State "comp1.solid.uv_rig13" | scalemethod = manual; scaleval = 1e-2*0.269072480941
      comp1_solid_phi_rig13: State "comp1.solid.phi_rig13" | scalemethod = manual; scaleval = 1e-2
      comp1_solid_uv_rig14: State "comp1.solid.uv_rig14" | scalemethod = manual; scaleval = 1e-2*0.269072480941
      comp1_solid_phi_rig14: State "comp1.solid.phi_rig14" | scalemethod = manual; scaleval = 1e-2
      comp1_solid_uv_rig15: State "comp1.solid.uv_rig15" | scalemethod = manual; scaleval = 1e-2*0.269072480941
      comp1_solid_phi_rig15: State "comp1.solid.phi_rig15" | scalemethod = manual; scaleval = 1e-2
      comp1_solid_uv_rig16: State "comp1.solid.uv_rig16" | scalemethod = manual; scaleval = 1e-2*0.269072480941
      comp1_solid_phi_rig16: State "comp1.solid.phi_rig16" | scalemethod = manual; scaleval = 1e-2
      comp1_solid_uv_rig17: State "comp1.solid.uv_rig17" | scalemethod = manual; scaleval = 1e-2*0.269072480941
      comp1_solid_phi_rig17: State "comp1.solid.phi_rig17" | scalemethod = manual; scaleval = 1e-2
      comp1_solid_uv_rig18: State "comp1.solid.uv_rig18" | scalemethod = manual; scaleval = 1e-2*0.269072480941
      comp1_solid_phi_rig18: State "comp1.solid.phi_rig18" | scalemethod = manual; scaleval = 1e-2
      comp1_solid_uv_rig19: State "comp1.solid.uv_rig19" | scalemethod = manual; scaleval = 1e-2*0.269072480941
      comp1_solid_phi_rig19: State "comp1.solid.phi_rig19" | scalemethod = manual; scaleval = 1e-2
      comp1_solid_uv_rig20: State "comp1.solid.uv_rig20" | scalemethod = manual; scaleval = 1e-2*0.269072480941
      comp1_solid_phi_rig20: State "comp1.solid.phi_rig20" | scalemethod = manual; scaleval = 1e-2
      comp1_solid_uv_rig21: State "comp1.solid.uv_rig21" | scalemethod = manual; scaleval = 1e-2*0.269072480941
      comp1_solid_phi_rig21: State "comp1.solid.phi_rig21" | scalemethod = manual; scaleval = 1e-2
      comp1_solid_uv_rig22: State "comp1.solid.uv_rig22" | scalemethod = manual; scaleval = 1e-2*0.269072480941
      comp1_solid_phi_rig22: State "comp1.solid.phi_rig22" | scalemethod = manual; scaleval = 1e-2
      comp1_solid_uv_rig23: State "comp1.solid.uv_rig23" | scalemethod = manual; scaleval = 1e-2*0.269072480941
      comp1_solid_phi_rig23: State "comp1.solid.phi_rig23" | scalemethod = manual; scaleval = 1e-2
      comp1_solid_uv_rig24: State "comp1.solid.uv_rig24" | scalemethod = manual; scaleval = 1e-2*0.269072480941
      comp1_solid_phi_rig24: State "comp1.solid.phi_rig24" | scalemethod = manual; scaleval = 1e-2
      comp1_solid_uv_rig25: State "comp1.solid.uv_rig25" | scalemethod = manual; scaleval = 1e-2*0.269072480941
      comp1_solid_phi_rig25: State "comp1.solid.phi_rig25" | scalemethod = manual; scaleval = 1e-2
      comp1_solid_uv_rig26: State "comp1.solid.uv_rig26" | scalemethod = manual; scaleval = 1e-2*0.269072480941
      comp1_solid_phi_rig26: State "comp1.solid.phi_rig26" | scalemethod = manual; scaleval = 1e-2
      comp1_solid_uv_rig27: State "comp1.solid.uv_rig27" | scalemethod = manual; scaleval = 1e-2*0.269072480941
      comp1_solid_phi_rig27: State "comp1.solid.phi_rig27" | scalemethod = manual; scaleval = 1e-2
      comp1_solid_uv_rig28: State "comp1.solid.uv_rig28" | scalemethod = manual; scaleval = 1e-2*0.269072480941
      comp1_solid_phi_rig28: State "comp1.solid.phi_rig28" | scalemethod = manual; scaleval = 1e-2
      comp1_solid_uv_rig29: State "comp1.solid.uv_rig29" | scalemethod = manual; scaleval = 1e-2*0.269072480941
      comp1_solid_phi_rig29: State "comp1.solid.phi_rig29" | scalemethod = manual; scaleval = 1e-2
      comp1_solid_uv_rig30: State "comp1.solid.uv_rig30" | scalemethod = manual; scaleval = 1e-2*0.269072480941
      comp1_solid_phi_rig30: State "comp1.solid.phi_rig30" | scalemethod = manual; scaleval = 1e-2
      comp1_solid_uv_rig31: State "comp1.solid.uv_rig31" | scalemethod = manual; scaleval = 1e-2*0.269072480941
      comp1_solid_phi_rig31: State "comp1.solid.phi_rig31" | scalemethod = manual; scaleval = 1e-2
    s1: Stationary "Stationary Solver 1"
      dDef: Direct
      fc1: FullyCoupled
    su1: StoreSolution
    v2: Variables "Dependent Variables 2" | initmethod = sol; notsolmethod = sol
      comp1_u: Field "Displacement field (Material) (comp1.u)" | scalemethod = manual; scaleval = 1e-2*0.269072480941
      comp1_solid_uv_rig2: State "comp1.solid.uv_rig2" | scalemethod = manual; scaleval = 1e-2*0.269072480941
      comp1_solid_phi_rig2: State "comp1.solid.phi_rig2" | scalemethod = manual; scaleval = 1e-2
      comp1_solid_uv_rig3: State "comp1.solid.uv_rig3" | scalemethod = manual; scaleval = 1e-2*0.269072480941
      comp1_solid_phi_rig3: State "comp1.solid.phi_rig3" | scalemethod = manual; scaleval = 1e-2
      comp1_solid_uv_rig4: State "comp1.solid.uv_rig4" | scalemethod = manual; scaleval = 1e-2*0.269072480941
      comp1_solid_phi_rig4: State "comp1.solid.phi_rig4" | scalemethod = manual; scaleval = 1e-2
      comp1_solid_uv_rig5: State "comp1.solid.uv_rig5" | scalemethod = manual; scaleval = 1e-2*0.269072480941
      comp1_solid_phi_rig5: State "comp1.solid.phi_rig5" | scalemethod = manual; scaleval = 1e-2
      comp1_solid_uv_rig6: State "comp1.solid.uv_rig6" | scalemethod = manual; scaleval = 1e-2*0.269072480941
      comp1_solid_phi_rig6: State "comp1.solid.phi_rig6" | scalemethod = manual; scaleval = 1e-2
      comp1_solid_uv_rig7: State "comp1.solid.uv_rig7" | scalemethod = manual; scaleval = 1e-2*0.269072480941
      comp1_solid_phi_rig7: State "comp1.solid.phi_rig7" | scalemethod = manual; scaleval = 1e-2
      comp1_solid_uv_rig8: State "comp1.solid.uv_rig8" | scalemethod = manual; scaleval = 1e-2*0.269072480941
      comp1_solid_phi_rig8: State "comp1.solid.phi_rig8" | scalemethod = manual; scaleval = 1e-2
      comp1_solid_uv_rig9: State "comp1.solid.uv_rig9" | scalemethod = manual; scaleval = 1e-2*0.269072480941
      comp1_solid_phi_rig9: State "comp1.solid.phi_rig9" | scalemethod = manual; scaleval = 1e-2
      comp1_solid_uv_rig10: State "comp1.solid.uv_rig10" | scalemethod = manual; scaleval = 1e-2*0.269072480941
      comp1_solid_phi_rig10: State "comp1.solid.phi_rig10" | scalemethod = manual; scaleval = 1e-2
      comp1_solid_uv_rig13: State "comp1.solid.uv_rig13" | scalemethod = manual; scaleval = 1e-2*0.269072480941
      comp1_solid_phi_rig13: State "comp1.solid.phi_rig13" | scalemethod = manual; scaleval = 1e-2
      comp1_solid_uv_rig14: State "comp1.solid.uv_rig14" | scalemethod = manual; scaleval = 1e-2*0.269072480941
      comp1_solid_phi_rig14: State "comp1.solid.phi_rig14" | scalemethod = manual; scaleval = 1e-2
      comp1_solid_uv_rig15: State "comp1.solid.uv_rig15" | scalemethod = manual; scaleval = 1e-2*0.269072480941
      comp1_solid_phi_rig15: State "comp1.solid.phi_rig15" | scalemethod = manual; scaleval = 1e-2
      comp1_solid_uv_rig16: State "comp1.solid.uv_rig16" | scalemethod = manual; scaleval = 1e-2*0.269072480941
      comp1_solid_phi_rig16: State "comp1.solid.phi_rig16" | scalemethod = manual; scaleval = 1e-2
      comp1_solid_uv_rig17: State "comp1.solid.uv_rig17" | scalemethod = manual; scaleval = 1e-2*0.269072480941
      comp1_solid_phi_rig17: State "comp1.solid.phi_rig17" | scalemethod = manual; scaleval = 1e-2
      comp1_solid_uv_rig18: State "comp1.solid.uv_rig18" | scalemethod = manual; scaleval = 1e-2*0.269072480941
      comp1_solid_phi_rig18: State "comp1.solid.phi_rig18" | scalemethod = manual; scaleval = 1e-2
      comp1_solid_uv_rig19: State "comp1.solid.uv_rig19" | scalemethod = manual; scaleval = 1e-2*0.269072480941
      comp1_solid_phi_rig19: State "comp1.solid.phi_rig19" | scalemethod = manual; scaleval = 1e-2
      comp1_solid_uv_rig20: State "comp1.solid.uv_rig20" | scalemethod = manual; scaleval = 1e-2*0.269072480941
      comp1_solid_phi_rig20: State "comp1.solid.phi_rig20" | scalemethod = manual; scaleval = 1e-2
      comp1_solid_uv_rig21: State "comp1.solid.uv_rig21" | scalemethod = manual; scaleval = 1e-2*0.269072480941
      comp1_solid_phi_rig21: State "comp1.solid.phi_rig21" | scalemethod = manual; scaleval = 1e-2
      comp1_solid_uv_rig22: State "comp1.solid.uv_rig22" | scalemethod = manual; scaleval = 1e-2*0.269072480941
      comp1_solid_phi_rig22: State "comp1.solid.phi_rig22" | scalemethod = manual; scaleval = 1e-2
      comp1_solid_uv_rig23: State "comp1.solid.uv_rig23" | scalemethod = manual; scaleval = 1e-2*0.269072480941
      comp1_solid_phi_rig23: State "comp1.solid.phi_rig23" | scalemethod = manual; scaleval = 1e-2
      comp1_solid_uv_rig24: State "comp1.solid.uv_rig24" | scalemethod = manual; scaleval = 1e-2*0.269072480941
      comp1_solid_phi_rig24: State "comp1.solid.phi_rig24" | scalemethod = manual; scaleval = 1e-2
      comp1_solid_uv_rig25: State "comp1.solid.uv_rig25" | scalemethod = manual; scaleval = 1e-2*0.269072480941
      comp1_solid_phi_rig25: State "comp1.solid.phi_rig25" | scalemethod = manual; scaleval = 1e-2
      comp1_solid_uv_rig26: State "comp1.solid.uv_rig26" | scalemethod = manual; scaleval = 1e-2*0.269072480941
      comp1_solid_phi_rig26: State "comp1.solid.phi_rig26" | scalemethod = manual; scaleval = 1e-2
      comp1_solid_uv_rig27: State "comp1.solid.uv_rig27" | scalemethod = manual; scaleval = 1e-2*0.269072480941
      comp1_solid_phi_rig27: State "comp1.solid.phi_rig27" | scalemethod = manual; scaleval = 1e-2
      comp1_solid_uv_rig28: State "comp1.solid.uv_rig28" | scalemethod = manual; scaleval = 1e-2*0.269072480941
      comp1_solid_phi_rig28: State "comp1.solid.phi_rig28" | scalemethod = manual; scaleval = 1e-2
      comp1_solid_uv_rig29: State "comp1.solid.uv_rig29" | scalemethod = manual; scaleval = 1e-2*0.269072480941
      comp1_solid_phi_rig29: State "comp1.solid.phi_rig29" | scalemethod = manual; scaleval = 1e-2
      comp1_solid_uv_rig30: State "comp1.solid.uv_rig30" | scalemethod = manual; scaleval = 1e-2*0.269072480941
      comp1_solid_phi_rig30: State "comp1.solid.phi_rig30" | scalemethod = manual; scaleval = 1e-2
      comp1_solid_uv_rig31: State "comp1.solid.uv_rig31" | scalemethod = manual; scaleval = 1e-2*0.269072480941
      comp1_solid_phi_rig31: State "comp1.solid.phi_rig31" | scalemethod = manual; scaleval = 1e-2
    e1: Eigenvalue "Eigenvalue Solver 1" | neigs = 25; transform = critical_load_factor; linpmethod = sol
      dDef: Direct